// COMSOL Multiphysics 6.0.0.318 model "FEA.mph"
// Outline of the model tree

Parameters
  EM.ai = 3.75[mm]  // inner radius
  EM.ao = 6.00[mm]  // outer radius
  EM.l = 4.00[mm]  // length
  EM.z = 6.00[mm]  // z of center
  EM.dw = 0.35[mm]  // wire diameter
  EM.N = 60  // number of turns
  EM.current = 0.01[A]  // current
  Coil.ai = 3.75[mm]
  Coil.ao = 6.00[mm]
  Coil.l = 3.00[mm]
  Coil.dist = 4.00[mm]
  Coil.dw = 0.08[mm]
  Coil.N = 1000
  Disk.r = 30[mm]  // radius of disk
  Disk.h = 10[mm]  // height of disk
  frequency = 50000[Hz]  // frequency
  bl = 100[mm]  // boundary length

Coordinate systems
  ie1: InfiniteElement "Infinite Element Domain 1" on domains 1, 4, 8-10 | ScalingType = Cylindrical

Geometry
  geom1 "Geometry 1" (2D axisymmetric, length unit m)
    r1: Rectangle "Electromagnet" | pos = {EM.ai, EM.z - EM.l/2}; size = {EM.ao - EM.ai, EM.l}
    r2: Rectangle "Disk" | pos = {0, -Disk.h}; size = {Disk.r, Disk.h}
    r3: Rectangle "Compute region"
      pos = {0, -bl/2}
      layername = Layer 1
      layer = 10[mm]
      layerright = on
      layertop = on
      size = {bl, bl}
    r4: Rectangle "Sense coil lower" | pos = {Coil.ai, EM.z - Coil.dist - Coil.l/2}; size = {Coil.ao - Coil.ai, Coil.l}
    r5: Rectangle "Sense coil upper" | pos = {Coil.ai, EM.z + Coil.dist - Coil.l/2}; size = {Coil.ao - Coil.ai, Coil.l}
    fin: Finalize "Form Union"

Materials
  mat1: Common "Air" on all domains
    def "Basic"
      relpermeability = 1
      relpermittivity = 1
      dynamicviscosity = eta(T[1/K])[Pa*s]
      ratioofspecificheat = 1.4
      electricconductivity = 0[S/m]
      heatcapacity = Cp(T[1/K])[J/(kg*K)]
      density = rho(pA[1/Pa],T[1/K])[kg/m^3]
      thermalconductivity = k(T[1/K])[W/(m*K)]
      soundspeed = cs(T[1/K])[m/s]
      eta: Piecewise | arg = T; pieces = {200.0, 1600.0, -8.38278E-7+8.35717342E-8*T^1-7.69429583E-11*T^2+4.6437266E-14*T^3-1.06585607E-17*T^4}
      Cp: Piecewise | arg = T; pieces = {200.0, 1600.0, 1047.63657-0.372589265*T^1+9.45304214E-4*T^2-6.02409443E-7*T^3+1.2858961E-10*T^4}
      rho: Analytic | expr = pA*0.02897/8.314/T; args = {pA, T}; dermethod = manual; argders = {{pA, d(pA*0.02897/8.314/T,pA)}, {T, d(pA*0.02897/8.314/T,T)}}
      k: Piecewise | arg = T; pieces = {200.0, 1600.0, -0.00227583562+1.15480022E-4*T^1-7.90252856E-8*T^2+4.11702505E-11*T^3-7.43864331E-15*T^4}
      cs: Analytic | expr = sqrt(1.4*287*T); args = T; dermethod = manual; argders = {T, d(sqrt(1.4*287*T),T)}
    RefractiveIndex
      n = 1
      ki = 0
  sw1: Switch on domains 3
    mat2: Common "Liver"
      def "Basic"
        heatcapacity = 3540[J/(kg*K)]
        density = 1079[kg/m^3]
        thermalconductivity = 0.52[W/(m*K)]
        frequencyfactor = 7.39e39
        activationenergy = 2.577e5
        relpermittivity = 10689.6532890173
        relpermeability = 1
        electricconductivity = 0.0720427887628
    mat3: Common "Air"
      def "Basic"
        relpermeability = 1
        relpermittivity = 1
        dynamicviscosity = eta(T[1/K])[Pa*s]
        ratioofspecificheat = 1.4
        electricconductivity = 0[S/m]
        heatcapacity = Cp(T[1/K])[J/(kg*K)]
        density = rho(pA[1/Pa],T[1/K])[kg/m^3]
        thermalconductivity = k(T[1/K])[W/(m*K)]
        soundspeed = cs(T[1/K])[m/s]
        eta: Piecewise | arg = T; pieces = {200.0, 1600.0, -8.38278E-7+8.35717342E-8*T^1-7.69429583E-11*T^2+4.6437266E-14*T^3-1.06585607E-17*T^4}
        Cp: Piecewise | arg = T; pieces = {200.0, 1600.0, 1047.63657-0.372589265*T^1+9.45304214E-4*T^2-6.02409443E-7*T^3+1.2858961E-10*T^4}
        rho: Analytic | expr = pA*0.02897/8.314/T; args = {pA, T}; dermethod = manual; argders = {{pA, d(pA*0.02897/8.314/T,pA)}, {T, d(pA*0.02897/8.314/T,T)}}
        k: Piecewise | arg = T; pieces = {200.0, 1600.0, -0.00227583562+1.15480022E-4*T^1-7.90252856E-8*T^2+4.11702505E-11*T^3-7.43864331E-15*T^4}
        cs: Analytic | expr = sqrt(1.4*287*T); args = T; dermethod = manual; argders = {T, d(sqrt(1.4*287*T),T)}
      RefractiveIndex
        n = 1
        ki = 0

Physics
  mf: InductionCurrents "Magnetic Fields" on all domains
    dependent variable A = {Ar, Aphi, Az}
    al1: AmperesLaw "Ampère's Law 1" (default)
    axi1: AxialSymmetry (default)
    mi1: MagneticInsulation (default)
    init1: init "Initial Values 1" (default)
    mtcd1: Coil "Excit coil" on domains 6
      CoilExcitation = Current
      N = EM.N
      sigmaCoil = 6e7
      AreaFrom = Diameter
      coilWindDiameter = EM.dw
      coilWindArea = EM.dw
      ICoil = EM.current
      VCoil = EM.voltage
    coil1: Coil "Sense coil lower" on domains 5
      ConductorModel = Multi
      ICoil = 0
      N = Coil.N
      AreaFrom = Diameter
      coilWindDiameter = Coil.dw
    coil2: Coil "Sense coil upper" on domains 7
      ConductorModel = Multi
      ICoil = 0
      N = Coil.N
      AreaFrom = Diameter
      coilWindDiameter = Coil.dw

Mesh
  mesh1 "Mesh 1" (physics-controlled)
    size: MeshSizeDefault | hauto = 1

Studies
  std1 "Study 1"
    matsw: MaterialSweep | pname = matsw.comp1.sw1; plistarr = range(1,1,2); pcase = all
    freq: Frequency "Frequency Domain" | plist = frequency

Solver configurations
  sol1 "Solution 1" (study std1)
    v1: Variables "Dependent Variables 1"
    s1: Stationary "Stationary Solver 1"
      dDef: Direct
      p1: Parametric | pname = freq; plistarr = frequency; punit = Hz; pcontinuationmode = no
      fc1: FullyCoupled | linsolver = dDef
  sol2 "Parametric Solutions 1" (study std1)

Datasets
  dset2: Solution "Study 1/Parametric Solutions 1" | solution = sol2
  dset4: Solution | solution = sol1

Plots
  pg1: PlotGroup2D "Magnetic flux density" | data = dset2
    surf1: Surface | expr = mf.normB
  pg2: PlotGroup2D "Current density" on domains 3 | data = dset2
    surf1: Surface | expr = mf.Jphi

Exports
  data3: Data "J"
    data = dset2
    expr = mf.Jphi
    filename = FEA_data/J.txt
    location = grid
    gridx2 = range(0,(Disk.r-0)/99,Disk.r)
    gridy2 = range(-Disk.h,(0-(-Disk.h))/99,0)
  data4: Data "V_E"
    data = dset2
    expr = {mf.VCoil_1, mf.VCoil_2, mf.VCoil_3}
    descr = {Coil voltage, Coil voltage, Coil voltage}
    filename = FEA_data/V_E.csv
    location = regulargrid
    regulargridx2 = 1
    regulargridy2 = 1