// COMSOL Multiphysics 5.1.0.145 model "FEA.mph"
// Outline of the model tree

Parameters
  EM.ai = 3.75[mm]  // inner radius
  EM.ao = 6.00[mm]  // outer radius
  EM.l = 4.00[mm]  // length
  EM.z = 5.00[mm]  // z of center
  EM.dw = 0.35[mm]  // wire diameter
  EM.sigma = 6e7[S/m]  // wire conductivity
  EM.N = 60  // number of turns
  EM.voltage = 1[V]  // voltage
  EM.pw = 3e-3[s]  // voltage pulse width
  EM.current = 1[A]  // current
  EM.f = 500[Hz]  // current frequency
  t_end = 5e-3[s]  // compute time end
  Disk.r = 30[mm]  // radius of disk
  Disk.h = 6[mm]  // height of disk
  Sensor.z = 2.5[mm]  // sensor z coordinates
  Sensor.r = 0[mm]  // sensor r coordinates lower
  bl = 100[mm]  // boundary length

Functions
  rect1: Rectangle | lower = 0; upper = EM.pw
  an2: Analytic | funcname = voltage; expr = EM.voltage * rect1(t); args = t; argunit = s; fununit = V
  an1: Analytic | funcname = current; expr = EM.current * sin(2*pi*EM.f * t); args = t; argunit = s; fununit = A

Coordinate systems
  ie1: InfiniteElement "Infinite Element Domain 1" on domains 1, 4, 6-8 | ScalingType = Cylindrical

Geometry
  geom1 "Geometry 1" (2D axisymmetric, length unit m)
    r1: Rectangle "Electromagnet"
      pos = {EM.ai, EM.z - EM.l/2}
      type = solid
      base = corner
      size = {EM.ao - EM.ai, EM.l}
    r2: Rectangle "Disk" | pos = {0, -Disk.h}; type = solid; base = corner; size = {Disk.r, Disk.h}
    r3: Rectangle "Compute region" | pos = {0, -bl/2}; layer = 10[mm]; layerright = on; layertop = on; size = {bl, bl}
    fin: Finalize "Form Union"

Materials
  mat1: Common "Air" on all domains
    def "Basic"
      relpermeability = 1
      relpermittivity = 1
      dynamicviscosity = eta(T[1/K])[Pa*s]
      ratioofspecificheat = 1.4
      electricconductivity = 0[S/m]
      heatcapacity = Cp(T[1/K])[J/(kg*K)]
      density = rho(pA[1/Pa],T[1/K])[kg/m^3]
      thermalconductivity = k(T[1/K])[W/(m*K)]
      soundspeed = cs(T[1/K])[m/s]
      eta: Piecewise | arg = T; extrap = constant; pieces = {200.0, 1600.0, -8.38278E-7+8.35717342E-8*T^1-7.69429583E-11*T^2+4.6437266E-14*T^3-1.06585607E-17*T^4}
      Cp: Piecewise | arg = T; extrap = constant; pieces = {200.0, 1600.0, 1047.63657-0.372589265*T^1+9.45304214E-4*T^2-6.02409443E-7*T^3+1.2858961E-10*T^4}
      rho: Analytic | expr = pA*0.02897/8.314/T; args = {pA, T}; dermethod = manual; argders = {{pA, d(pA*0.02897/8.314/T,pA)}, {T, d(pA*0.02897/8.314/T,T)}}
      k: Piecewise | arg = T; extrap = constant; pieces = {200.0, 1600.0, -0.00227583562+1.15480022E-4*T^1-7.90252856E-8*T^2+4.11702505E-11*T^3-7.43864331E-15*T^4}
      cs: Analytic | expr = sqrt(1.4*287*T); args = T; dermethod = manual; argders = {T, d(sqrt(1.4*287*T),T)}
    RefractiveIndex
      n = 1
      ki = 0
  sw1: Switch on domains 3
    mat7: Common "Stainless Steel mu_r 50"
      def "Basic"
        dL = (dL(T[1/K])-dL(Tempref[1/K]))/(1+dL(Tempref[1/K]))
        CTE = CTE(T[1/K])[1/K]
        thermalconductivity = k_solid_annealed_1(T[1/K])[W/(m*K)]
        Syt = Syt(T[1/K])[Pa]
        elong = elong(T[1/K])
        thermalexpansioncoefficient = (alpha(T[1/K])[1/K]+(Tempref-293[K])*if(abs(T-Tempref)>1e-3,(alpha(T[1/K])[1/K]-alpha(Tempref[1/K])[1/K])/(T-Tempref),d(alpha(T[1/K]),T)[1/K]))/(1+alpha(Tempref[1/K])[1/K]*(Tempref-293[K]))
        density = rho(T[1/K])[kg/m^3]
        electricconductivity = 1.45e6
        relpermittivity = 1
        relpermeability = 50
        dL: Piecewise | arg = T; extrap = constant; pieces = {273.0, 773.0, -0.002840338+9.034735E-6*T^1+2.25E-9*T^2}
        CTE: Piecewise | arg = T; extrap = constant; pieces = {273.0, 773.0, 9.034735E-6+4.5E-9*T^1}
        k_solid_annealed_1: Piecewise | arg = T; extrap = constant; pieces = {293.0, 672.0, 15.68406+0.004751497*T^1+9.430177E-6*T^2}
        Syt: Piecewise
          arg = T
          extrap = constant
          pieces = 
            {293.0, 700.0, 1.406909E9-72511.58*T^1-712.5519*T^2}
            {700.0, 922.0, 3.132737E9-2866326.0*T^1-243.4867*T^2}
        elong: Piecewise
          arg = T
          extrap = constant
          pieces = 
            {293.0, 700.0, 22.92739-0.04553367*T^1+4.580852E-5*T^2}
            {700.0, 922.0, 139.1546-0.4067608*T^1+3.24649E-4*T^2}
        alpha: Piecewise | arg = T; extrap = constant; pieces = {273.0, 773.0, 9.693985E-6+2.25E-9*T^1}
        rho: Piecewise | arg = T; extrap = constant; pieces = {273.0, 773.0, 7846.922-0.2149242*T^1-4.60021E-5*T^2}
      ElastoplasticModel "Elastoplastic material model"
        sigmags = Sys(T[1/K])[Pa]
        Hillcoefficients = {0, 0, 0, 0, 0, 0}
        ys = {0, 0, 0, 0, 0, 0}
        Sys: Piecewise
          arg = T
          extrap = constant
          pieces = 
            {293.0, 700.0, 1.517208E9-803263.8*T^1+91.99314*T^2}
            {700.0, 922.0, -1.989049E11+1.0258E9*T^1-1939205.0*T^2+1603.626*T^3-0.4914133*T^4}
    mat8: Common "Stainless Steel mu_r 60"
      def "Basic"
        dL = (dL(T[1/K])-dL(Tempref[1/K]))/(1+dL(Tempref[1/K]))
        CTE = CTE(T[1/K])[1/K]
        thermalconductivity = k_solid_annealed_1(T[1/K])[W/(m*K)]
        Syt = Syt(T[1/K])[Pa]
        elong = elong(T[1/K])
        thermalexpansioncoefficient = (alpha(T[1/K])[1/K]+(Tempref-293[K])*if(abs(T-Tempref)>1e-3,(alpha(T[1/K])[1/K]-alpha(Tempref[1/K])[1/K])/(T-Tempref),d(alpha(T[1/K]),T)[1/K]))/(1+alpha(Tempref[1/K])[1/K]*(Tempref-293[K]))
        density = rho(T[1/K])[kg/m^3]
        electricconductivity = 1.45e6
        relpermittivity = 1
        relpermeability = 60
        dL: Piecewise | arg = T; extrap = constant; pieces = {273.0, 773.0, -0.002840338+9.034735E-6*T^1+2.25E-9*T^2}
        CTE: Piecewise | arg = T; extrap = constant; pieces = {273.0, 773.0, 9.034735E-6+4.5E-9*T^1}
        k_solid_annealed_1: Piecewise | arg = T; extrap = constant; pieces = {293.0, 672.0, 15.68406+0.004751497*T^1+9.430177E-6*T^2}
        Syt: Piecewise
          arg = T
          extrap = constant
          pieces = 
            {293.0, 700.0, 1.406909E9-72511.58*T^1-712.5519*T^2}
            {700.0, 922.0, 3.132737E9-2866326.0*T^1-243.4867*T^2}
        elong: Piecewise
          arg = T
          extrap = constant
          pieces = 
            {293.0, 700.0, 22.92739-0.04553367*T^1+4.580852E-5*T^2}
            {700.0, 922.0, 139.1546-0.4067608*T^1+3.24649E-4*T^2}
        alpha: Piecewise | arg = T; extrap = constant; pieces = {273.0, 773.0, 9.693985E-6+2.25E-9*T^1}
        rho: Piecewise | arg = T; extrap = constant; pieces = {273.0, 773.0, 7846.922-0.2149242*T^1-4.60021E-5*T^2}
      ElastoplasticModel "Elastoplastic material model"
        sigmags = Sys(T[1/K])[Pa]
        Hillcoefficients = {0, 0, 0, 0, 0, 0}
        ys = {0, 0, 0, 0, 0, 0}
        Sys: Piecewise
          arg = T
          extrap = constant
          pieces = 
            {293.0, 700.0, 1.517208E9-803263.8*T^1+91.99314*T^2}
            {700.0, 922.0, -1.989049E11+1.0258E9*T^1-1939205.0*T^2+1603.626*T^3-0.4914133*T^4}
    mat9: Common "Stainless Steel mu_r 70"
      def "Basic"
        dL = (dL(T[1/K])-dL(Tempref[1/K]))/(1+dL(Tempref[1/K]))
        CTE = CTE(T[1/K])[1/K]
        thermalconductivity = k_solid_annealed_1(T[1/K])[W/(m*K)]
        Syt = Syt(T[1/K])[Pa]
        elong = elong(T[1/K])
        thermalexpansioncoefficient = (alpha(T[1/K])[1/K]+(Tempref-293[K])*if(abs(T-Tempref)>1e-3,(alpha(T[1/K])[1/K]-alpha(Tempref[1/K])[1/K])/(T-Tempref),d(alpha(T[1/K]),T)[1/K]))/(1+alpha(Tempref[1/K])[1/K]*(Tempref-293[K]))
        density = rho(T[1/K])[kg/m^3]
        electricconductivity = 1.45e6
        relpermittivity = 1
        relpermeability = 70
        dL: Piecewise | arg = T; extrap = constant; pieces = {273.0, 773.0, -0.002840338+9.034735E-6*T^1+2.25E-9*T^2}
        CTE: Piecewise | arg = T; extrap = constant; pieces = {273.0, 773.0, 9.034735E-6+4.5E-9*T^1}
        k_solid_annealed_1: Piecewise | arg = T; extrap = constant; pieces = {293.0, 672.0, 15.68406+0.004751497*T^1+9.430177E-6*T^2}
        Syt: Piecewise
          arg = T
          extrap = constant
          pieces = 
            {293.0, 700.0, 1.406909E9-72511.58*T^1-712.5519*T^2}
            {700.0, 922.0, 3.132737E9-2866326.0*T^1-243.4867*T^2}
        elong: Piecewise
          arg = T
          extrap = constant
          pieces = 
            {293.0, 700.0, 22.92739-0.04553367*T^1+4.580852E-5*T^2}
            {700.0, 922.0, 139.1546-0.4067608*T^1+3.24649E-4*T^2}
        alpha: Piecewise | arg = T; extrap = constant; pieces = {273.0, 773.0, 9.693985E-6+2.25E-9*T^1}
        rho: Piecewise | arg = T; extrap = constant; pieces = {273.0, 773.0, 7846.922-0.2149242*T^1-4.60021E-5*T^2}
      ElastoplasticModel "Elastoplastic material model"
        sigmags = Sys(T[1/K])[Pa]
        Hillcoefficients = {0, 0, 0, 0, 0, 0}
        ys = {0, 0, 0, 0, 0, 0}
        Sys: Piecewise
          arg = T
          extrap = constant
          pieces = 
            {293.0, 700.0, 1.517208E9-803263.8*T^1+91.99314*T^2}
            {700.0, 922.0, -1.989049E11+1.0258E9*T^1-1939205.0*T^2+1603.626*T^3-0.4914133*T^4}
    mat10: Common "Stainless Steel mu_r 80"
      def "Basic"
        dL = (dL(T[1/K])-dL(Tempref[1/K]))/(1+dL(Tempref[1/K]))
        CTE = CTE(T[1/K])[1/K]
        thermalconductivity = k_solid_annealed_1(T[1/K])[W/(m*K)]
        Syt = Syt(T[1/K])[Pa]
        elong = elong(T[1/K])
        thermalexpansioncoefficient = (alpha(T[1/K])[1/K]+(Tempref-293[K])*if(abs(T-Tempref)>1e-3,(alpha(T[1/K])[1/K]-alpha(Tempref[1/K])[1/K])/(T-Tempref),d(alpha(T[1/K]),T)[1/K]))/(1+alpha(Tempref[1/K])[1/K]*(Tempref-293[K]))
        density = rho(T[1/K])[kg/m^3]
        electricconductivity = 1.45e6
        relpermittivity = 1
        relpermeability = 80
        dL: Piecewise | arg = T; extrap = constant; pieces = {273.0, 773.0, -0.002840338+9.034735E-6*T^1+2.25E-9*T^2}
        CTE: Piecewise | arg = T; extrap = constant; pieces = {273.0, 773.0, 9.034735E-6+4.5E-9*T^1}
        k_solid_annealed_1: Piecewise | arg = T; extrap = constant; pieces = {293.0, 672.0, 15.68406+0.004751497*T^1+9.430177E-6*T^2}
        Syt: Piecewise
          arg = T
          extrap = constant
          pieces = 
            {293.0, 700.0, 1.406909E9-72511.58*T^1-712.5519*T^2}
            {700.0, 922.0, 3.132737E9-2866326.0*T^1-243.4867*T^2}
        elong: Piecewise
          arg = T
          extrap = constant
          pieces = 
            {293.0, 700.0, 22.92739-0.04553367*T^1+4.580852E-5*T^2}
            {700.0, 922.0, 139.1546-0.4067608*T^1+3.24649E-4*T^2}
        alpha: Piecewise | arg = T; extrap = constant; pieces = {273.0, 773.0, 9.693985E-6+2.25E-9*T^1}
        rho: Piecewise | arg = T; extrap = constant; pieces = {273.0, 773.0, 7846.922-0.2149242*T^1-4.60021E-5*T^2}
      ElastoplasticModel "Elastoplastic material model"
        sigmags = Sys(T[1/K])[Pa]
        Hillcoefficients = {0, 0, 0, 0, 0, 0}
        ys = {0, 0, 0, 0, 0, 0}
        Sys: Piecewise
          arg = T
          extrap = constant
          pieces = 
            {293.0, 700.0, 1.517208E9-803263.8*T^1+91.99314*T^2}
            {700.0, 922.0, -1.989049E11+1.0258E9*T^1-1939205.0*T^2+1603.626*T^3-0.4914133*T^4}
    mat11: Common "Stainless Steel mu_r 90"
      def "Basic"
        dL = (dL(T[1/K])-dL(Tempref[1/K]))/(1+dL(Tempref[1/K]))
        CTE = CTE(T[1/K])[1/K]
        thermalconductivity = k_solid_annealed_1(T[1/K])[W/(m*K)]
        Syt = Syt(T[1/K])[Pa]
        elong = elong(T[1/K])
        thermalexpansioncoefficient = (alpha(T[1/K])[1/K]+(Tempref-293[K])*if(abs(T-Tempref)>1e-3,(alpha(T[1/K])[1/K]-alpha(Tempref[1/K])[1/K])/(T-Tempref),d(alpha(T[1/K]),T)[1/K]))/(1+alpha(Tempref[1/K])[1/K]*(Tempref-293[K]))
        density = rho(T[1/K])[kg/m^3]
        electricconductivity = 1.45e6
        relpermittivity = 1
        relpermeability = 90
        dL: Piecewise | arg = T; extrap = constant; pieces = {273.0, 773.0, -0.002840338+9.034735E-6*T^1+2.25E-9*T^2}
        CTE: Piecewise | arg = T; extrap = constant; pieces = {273.0, 773.0, 9.034735E-6+4.5E-9*T^1}
        k_solid_annealed_1: Piecewise | arg = T; extrap = constant; pieces = {293.0, 672.0, 15.68406+0.004751497*T^1+9.430177E-6*T^2}
        Syt: Piecewise
          arg = T
          extrap = constant
          pieces = 
            {293.0, 700.0, 1.406909E9-72511.58*T^1-712.5519*T^2}
            {700.0, 922.0, 3.132737E9-2866326.0*T^1-243.4867*T^2}
        elong: Piecewise
          arg = T
          extrap = constant
          pieces = 
            {293.0, 700.0, 22.92739-0.04553367*T^1+4.580852E-5*T^2}
            {700.0, 922.0, 139.1546-0.4067608*T^1+3.24649E-4*T^2}
        alpha: Piecewise | arg = T; extrap = constant; pieces = {273.0, 773.0, 9.693985E-6+2.25E-9*T^1}
        rho: Piecewise | arg = T; extrap = constant; pieces = {273.0, 773.0, 7846.922-0.2149242*T^1-4.60021E-5*T^2}
      ElastoplasticModel "Elastoplastic material model"
        sigmags = Sys(T[1/K])[Pa]
        Hillcoefficients = {0, 0, 0, 0, 0, 0}
        ys = {0, 0, 0, 0, 0, 0}
        Sys: Piecewise
          arg = T
          extrap = constant
          pieces = 
            {293.0, 700.0, 1.517208E9-803263.8*T^1+91.99314*T^2}
            {700.0, 922.0, -1.989049E11+1.0258E9*T^1-1939205.0*T^2+1603.626*T^3-0.4914133*T^4}
    mat6: Common "Air"
      def "Basic"
        relpermeability = 1
        relpermittivity = 1
        dynamicviscosity = eta(T[1/K])[Pa*s]
        ratioofspecificheat = 1.4
        electricconductivity = 0[S/m]
        heatcapacity = Cp(T[1/K])[J/(kg*K)]
        density = rho(pA[1/Pa],T[1/K])[kg/m^3]
        thermalconductivity = k(T[1/K])[W/(m*K)]
        soundspeed = cs(T[1/K])[m/s]
        eta: Piecewise | arg = T; extrap = constant; pieces = {200.0, 1600.0, -8.38278E-7+8.35717342E-8*T^1-7.69429583E-11*T^2+4.6437266E-14*T^3-1.06585607E-17*T^4}
        Cp: Piecewise | arg = T; extrap = constant; pieces = {200.0, 1600.0, 1047.63657-0.372589265*T^1+9.45304214E-4*T^2-6.02409443E-7*T^3+1.2858961E-10*T^4}
        rho: Analytic | expr = pA*0.02897/8.314/T; args = {pA, T}; dermethod = manual; argders = {{pA, d(pA*0.02897/8.314/T,pA)}, {T, d(pA*0.02897/8.314/T,T)}}
        k: Piecewise | arg = T; extrap = constant; pieces = {200.0, 1600.0, -0.00227583562+1.15480022E-4*T^1-7.90252856E-8*T^2+4.11702505E-11*T^3-7.43864331E-15*T^4}
        cs: Analytic | expr = sqrt(1.4*287*T); args = T; dermethod = manual; argders = {T, d(sqrt(1.4*287*T),T)}
      RefractiveIndex
        n = 1
        ki = 0

Physics
  mf: InductionCurrents "Magnetic Fields" on all domains
    dependent variable A = {Ar, Aphi, Az}
    al1: AmperesLaw "Ampère's Law 1" (default)
    axi1: AxialSymmetry (default)
    mi1: MagneticInsulation (default)
    init1: init "Initial Values 1" (default)
    mtcd1: MultiTurnCoilDomain "Multi-Turn Coil 1" on domains 5
      CoilExcitation = Voltage
      N = EM.N
      sigmaCoil = EM.sigma
      AreaFrom = Diameter
      coilWindDiameter = EM.dw
      ICoil = current(t)
      VCoil = voltage(t)

Mesh
  mesh1 "Mesh 1"
    size: MeshSizeDefault | hauto = 3
    ftri1: FreeTri "Free Triangular 1" on domains 5
      size1: Size on domains 5 | hauto = 1
    ftri2: FreeTri "Free Triangular 2" on domains 3
      size1: Size on domains 3 | hauto = 1
    ftri3: FreeTri "Free Triangular 3" on remaining entities

Studies
  std2 "Study 1"
    matsw: MaterialSweep | pname = matsw.comp1.sw1; plistarr = range(1,1,6); pcase = all
    time: Transient "Time Dependent" | tlist = range(0,(t_end-0)/499,t_end)

Solver configurations
  sol1 "Solution 1" (study std2)
    v1: Variables "Dependent Variables 1"
    t1: Time "Time-Dependent Solver 1" | tlist = range(0,(t_end-0)/499,t_end); maxstepbdf = t_end / 500
      dDef: Direct
      fc1: FullyCoupled | linsolver = dDef
  sol2 "Parametric Solutions 1" (study std2)

Datasets
  dset1: Solution | solution = sol1
  dset2: Solution "Study 1/Parametric Solutions 1" | solution = sol2

Exports
  data5: Data "B_mur50"
    data = dset2
    expr = {t, mf.Br, mf.Bz}
    descr = {Time, "Magnetic flux density, r component", "Magnetic flux density, z component"}
    filename = FEA_data/B_mur50.csv
    location = grid
    gridx2 = Sensor.r
    gridy2 = Sensor.z
  data7: Data "B_mur60"
    data = dset2
    expr = {t, mf.Br, mf.Bz}
    descr = {Time, "Magnetic flux density, r component", "Magnetic flux density, z component"}
    filename = FEA_data/B_mur60.csv
    location = grid
    gridx2 = Sensor.r
    gridy2 = Sensor.z
  data8: Data "B_mur70"
    data = dset2
    expr = {t, mf.Br, mf.Bz}
    descr = {Time, "Magnetic flux density, r component", "Magnetic flux density, z component"}
    filename = FEA_data/B_mur70.csv
    location = grid
    gridx2 = Sensor.r
    gridy2 = Sensor.z
  data9: Data "B_mur80"
    data = dset2
    expr = {t, mf.Br, mf.Bz}
    descr = {Time, "Magnetic flux density, r component", "Magnetic flux density, z component"}
    filename = FEA_data/B_mur80.csv
    location = grid
    gridx2 = Sensor.r
    gridy2 = Sensor.z
  data10: Data "B_mur90"
    data = dset2
    expr = {t, mf.Br, mf.Bz}
    descr = {Time, "Magnetic flux density, r component", "Magnetic flux density, z component"}
    filename = FEA_data/B_mur90.csv
    location = grid
    gridx2 = Sensor.r
    gridy2 = Sensor.z
  data6: Data "B_E"
    data = dset2
    expr = {t, mf.Br, mf.Bz}
    descr = {Time, "Magnetic flux density, r component", "Magnetic flux density, z component"}
    filename = FEA_data/B_E.csv
    location = grid
    gridx2 = Sensor.r
    gridy2 = Sensor.z
  data11: Data "J"
    data = dset2
    expr = {t, mf.Jphi}
    filename = FEA_data/J.csv
    location = grid
    gridx2 = 0.0045
    gridy2 = -0.0003