// COMSOL Multiphysics 5.1.0.145 model "FEA.mph"
// Outline of the model tree

Parameters
  EM.ai = 3.75[mm]  // inner radius of electromagnet
  EM.ao = 6.00[mm]  // outer radius of electromagnet
  EM.l = 4.00[mm]  // length of electromagnet
  EM.z = 5.00[mm]  // z of center of electromagnet
  EM.current = 1[A]
  EM.Nturns = 60
  EM.current_density = EM.current*EM.Nturns / ((EM.ao-EM.ai)*EM.l)  // current density of electromagnet
  EM.frequency = 20000[Hz]  // frequency of current
  disk.radius = 30[mm]  // radius of disk
  disk.height = 6[mm]  // height of disk
  compute_radius = 100[mm]
  Sensor.z = 2.5[mm]
  Sensor.r1 = 6[mm]
  Sensor.r2 = 30[mm]

Coordinate systems
  ie1: InfiniteElement "Infinite Element Domain 1" on domains 1, 4, 6-8 | ScalingType = Cylindrical

Geometry
  geom1 "Geometry 1" (2D axisymmetric, length unit m)
    r1: Rectangle "Electromagnet"
      pos = {EM.ai, EM.z - EM.l/2}
      type = solid
      base = corner
      size = {EM.ao - EM.ai, EM.l}
    r2: Rectangle "Disk" | pos = {0, -disk.height}; type = solid; base = corner; size = {disk.radius, disk.height}
    r3: Rectangle "Region of compute"
      pos = {0, -compute_radius/2}
      layer = 10[mm]
      layerright = on
      layertop = on
      size = {compute_radius, compute_radius}
    fin: Finalize "Form Union"

Materials
  mat1: Common "Air" on all domains
    def "Basic"
      relpermeability = 1
      relpermittivity = 1
      dynamicviscosity = eta(T[1/K])[Pa*s]
      ratioofspecificheat = 1.4
      electricconductivity = 0[S/m]
      heatcapacity = Cp(T[1/K])[J/(kg*K)]
      density = rho(pA[1/Pa],T[1/K])[kg/m^3]
      thermalconductivity = k(T[1/K])[W/(m*K)]
      soundspeed = cs(T[1/K])[m/s]
      eta: Piecewise | arg = T; extrap = constant; pieces = {200.0, 1600.0, -8.38278E-7+8.35717342E-8*T^1-7.69429583E-11*T^2+4.6437266E-14*T^3-1.06585607E-17*T^4}
      Cp: Piecewise | arg = T; extrap = constant; pieces = {200.0, 1600.0, 1047.63657-0.372589265*T^1+9.45304214E-4*T^2-6.02409443E-7*T^3+1.2858961E-10*T^4}
      rho: Analytic | expr = pA*0.02897/8.314/T; args = {pA, T}; dermethod = manual; argders = {{pA, d(pA*0.02897/8.314/T,pA)}, {T, d(pA*0.02897/8.314/T,T)}}
      k: Piecewise | arg = T; extrap = constant; pieces = {200.0, 1600.0, -0.00227583562+1.15480022E-4*T^1-7.90252856E-8*T^2+4.11702505E-11*T^3-7.43864331E-15*T^4}
      cs: Analytic | expr = sqrt(1.4*287*T); args = T; dermethod = manual; argders = {T, d(sqrt(1.4*287*T),T)}
    RefractiveIndex
      n = 1
      ki = 0
  mat2: Common "Stainless Steel" on domains 3
    def "Basic"
      relpermeability = 50
      heatcapacity = 900[J/(kg*K)]
      thermalconductivity = 238[W/(m*K)]
      electricconductivity = 1.45e6[S/m]
      relpermittivity = 1
      thermalexpansioncoefficient = 23e-6[1/K]
      density = 2700[kg/m^3]
    Enu "Young's modulus and Poisson's ratio"
      youngsmodulus = 70e9[Pa]
      poissonsratio = 0.33
    Murnaghan
      l = -2.5e11[Pa]
      m = -3.3e11[Pa]
      n = -3.5e11[Pa]
    Lame "Lamé parameters"
      lambLame = 5.1e10[Pa]
      muLame = 2.6e10[Pa]

Physics
  mf: InductionCurrents "Magnetic Fields" on all domains
    dependent variable A = {Ar, Aphi, Az}
    al1: AmperesLaw "Ampère's Law 1" (default)
    axi1: AxialSymmetry (default)
    mi1: MagneticInsulation (default)
    init1: init "Initial Values 1" (default)
    ecd1: ExternalCurrentDensity "EM Current Density" on domains 5 | Je = {0, EM.current_density, 0}

Mesh
  mesh1 "Mesh 1"
    size: MeshSizeDefault | hmax = 0.0067; hmin = 3.0E-5; hcurve = 0.3; hnarrow = 1; hgrad = 1.3; hauto = 5
    ftri1: FreeTri "Free Triangular 1" on domains 3, 5
      size1: Size on domains 3, 5 | hauto = 1
    ftri2: FreeTri "Free Triangular 2" on remaining entities

Studies
  std1 "Study 1"
    freq: Frequency "Frequency Domain" | punit = Hz; plist = EM.frequency

Solver configurations
  sol2 "Solution 1" (study std1)
    v1: Variables "Dependent Variables 1"
    s1: Stationary "Stationary Solver 1"
      dDef: Direct
      p1: Parametric | pname = freq; plistarr = EM.frequency; punit = Hz; pcontinuationmode = no
      fc1: FullyCoupled | linsolver = dDef

Datasets
  dset1: Solution | solution = sol2
  dset2: Solution "Study 1/Solution 1 (disk)" on domains 3 | solution = sol2

Plots
  pg2: PlotGroup2D "Magnetic flux density, r component" | data = dset1
    surf1: Surface | expr = mf.Br
  pg1: PlotGroup2D "Magnetic flux density, z component" | data = dset1
    surf1: Surface | expr = mf.Bz
  pg3: PlotGroup2D "Current density" | data = dset2
    surf1: Surface | expr = mf.Jphi

Exports
  data1: Data "Magnetic flux density"
    data = dset1
    expr = {mf.Br, mf.Bz}
    filename = FEA_data/B_E_plus_B_C.csv
    location = grid
    gridx2 = range(Sensor.r1,(Sensor.r2-(Sensor.r1))/99,Sensor.r2)
    gridy2 = Sensor.z
  data2: Data "Current density"
    data = dset1
    expr = mf.Jphi
    filename = FEA_data/J.csv
    location = grid
    gridx2 = range(0,(disk.radius-0)/199,disk.radius)
    gridy2 = range(-disk.height,(0-(-disk.height))/199,0)