// COMSOL Multiphysics 5.1.0.145 model "FEA.mph"
// Outline of the model tree

Parameters
  EM.ai = 3.75[mm]  // inner radius
  EM.ao = 6.00[mm]  // outer radius
  EM.l = 4.00[mm]  // length
  EM.z = 5.00[mm]  // z of center
  EM.dw = 0.35[mm]  // wire diameter
  EM.sigma = 6e7[S/m]  // wire conductivity
  EM.N = 60  // number of turns
  EM.voltage = 1[V]  // voltage
  EM.pw = 3e-3[s]  // voltage pulse width
  EM.current = 1[A]  // current
  EM.f = 2000[Hz]  // current frequency
  t_end = 6e-3[s]  // compute time end
  Disk.r = 30[mm]  // radius of disk
  Disk.h = 6[mm]  // height of disk
  Sensor.z = 2.5[mm]  // sensor z coordinates
  Sensor.r = 0[mm]  // sensor r coordinates lower
  bl = 100[mm]  // boundary length

Functions
  rect1: Rectangle | lower = 0; upper = EM.pw
  an1: Analytic | funcname = voltage; expr = EM.voltage * rect1(t); args = t; argunit = s; fununit = V
  an2: Analytic | funcname = current; expr = EM.current * sin(2*pi*EM.f * t); args = t; argunit = s; fununit = A

Coordinate systems
  ie1: InfiniteElement "Infinite Element Domain 1" on domains 1, 4, 6-8 | ScalingType = Cylindrical

Geometry
  geom1 "Geometry 1" (2D axisymmetric, length unit m)
    r1: Rectangle "Electromagnet"
      pos = {EM.ai, EM.z - EM.l/2}
      type = solid
      base = corner
      size = {EM.ao - EM.ai, EM.l}
    r2: Rectangle "Disk" | pos = {0, -Disk.h}; type = solid; base = corner; size = {Disk.r, Disk.h}
    r3: Rectangle "Compute region" | pos = {0, -bl/2}; layer = 10[mm]; layerright = on; layertop = on; size = {bl, bl}
    fin: Finalize "Form Union"

Materials
  mat1: Common "Air" on all domains
    def "Basic"
      relpermeability = 1
      relpermittivity = 1
      dynamicviscosity = eta(T[1/K])[Pa*s]
      ratioofspecificheat = 1.4
      electricconductivity = 0[S/m]
      heatcapacity = Cp(T[1/K])[J/(kg*K)]
      density = rho(pA[1/Pa],T[1/K])[kg/m^3]
      thermalconductivity = k(T[1/K])[W/(m*K)]
      soundspeed = cs(T[1/K])[m/s]
      eta: Piecewise | arg = T; extrap = constant; pieces = {200.0, 1600.0, -8.38278E-7+8.35717342E-8*T^1-7.69429583E-11*T^2+4.6437266E-14*T^3-1.06585607E-17*T^4}
      Cp: Piecewise | arg = T; extrap = constant; pieces = {200.0, 1600.0, 1047.63657-0.372589265*T^1+9.45304214E-4*T^2-6.02409443E-7*T^3+1.2858961E-10*T^4}
      rho: Analytic | expr = pA*0.02897/8.314/T; args = {pA, T}; dermethod = manual; argders = {{pA, d(pA*0.02897/8.314/T,pA)}, {T, d(pA*0.02897/8.314/T,T)}}
      k: Piecewise | arg = T; extrap = constant; pieces = {200.0, 1600.0, -0.00227583562+1.15480022E-4*T^1-7.90252856E-8*T^2+4.11702505E-11*T^3-7.43864331E-15*T^4}
      cs: Analytic | expr = sqrt(1.4*287*T); args = T; dermethod = manual; argders = {T, d(sqrt(1.4*287*T),T)}
    RefractiveIndex
      n = 1
      ki = 0
  sw1: Switch on domains 3
    mat1: Common "Titanium"
      def "Basic"
        relpermeability = 1
        electricconductivity = 0.238e7[S/m]
        thermalexpansioncoefficient = 7.06e-6[1/K]
        heatcapacity = 710[J/(kg*K)]
        relpermittivity = 1
        density = 4940[kg/m^3]
        thermalconductivity = 7.5[W/(m*K)]
      Enu "Young's modulus and Poisson's ratio"
        youngsmodulus = 105e9[Pa]
        poissonsratio = 0.33
    mat2: Common "Zinc"
      def "Basic"
        thermalexpansioncoefficient = 4.5e-6[1/K]
        density = 17800[kg/m^3]
        heatcapacity = 132[J/(kg*K)]
        thermalconductivity = 175[W/(m*K)]
        electricconductivity = 1.69e7
        relpermittivity = 1
        relpermeability = 1
      Enu "Young's modulus and Poisson's ratio"
        youngsmodulus = 3.6e11[Pa]
        poissonsratio = 0.27
      Murnaghan
        l = -4.7e11[Pa]
        m = -7.9e11[Pa]
        n = -1.1e12[Pa]
      Lame "Lamé parameters"
        lambLame = 1.6e11[Pa]
        muLame = 1.4e11[Pa]
    mat3: Common "Molybdenum"
      def "Basic"
        thermalexpansioncoefficient = 4.8e-6[1/K]
        density = 10200[kg/m^3]
        heatcapacity = 250[J/(kg*K)]
        thermalconductivity = 138[W/(m*K)]
        electricconductivity = 1.91e7
        relpermittivity = 1
        relpermeability = 1
      Enu "Young's modulus and Poisson's ratio"
        youngsmodulus = 3.12e11[Pa]
        poissonsratio = 0.30
      Murnaghan
        l = -3.0e11[Pa]
        m = -8.5e11[Pa]
        n = -9.1e11[Pa]
      Lame "Lamé parameters"
        lambLame = 1.8e11[Pa]
        muLame = 1.2e11[Pa]
    mat4: Common "Aluminum"
      def "Basic"
        relpermeability = 1
        heatcapacity = 900[J/(kg*K)]
        thermalconductivity = 238[W/(m*K)]
        electricconductivity = 3.57e7[S/m]
        relpermittivity = 1
        thermalexpansioncoefficient = 23e-6[1/K]
        density = 2700[kg/m^3]
      Enu "Young's modulus and Poisson's ratio"
        youngsmodulus = 70e9[Pa]
        poissonsratio = 0.33
      Murnaghan
        l = -2.5e11[Pa]
        m = -3.3e11[Pa]
        n = -3.5e11[Pa]
      Lame "Lamé parameters"
        lambLame = 5.1e10[Pa]
        muLame = 2.6e10[Pa]
    mat5: Common "Copper"
      def "Basic"
        relpermeability = 1
        electricconductivity = 5.96e7[S/m]
        thermalexpansioncoefficient = 17e-6[1/K]
        heatcapacity = 385[J/(kg*K)]
        relpermittivity = 1
        density = 8700[kg/m^3]
        thermalconductivity = 400[W/(m*K)]
      Enu "Young's modulus and Poisson's ratio"
        youngsmodulus = 110e9[Pa]
        poissonsratio = 0.35
      linzRes "Linearized resistivity"
        rho0 = 1.72e-8[ohm*m]
        alpha = 0.0039[1/K]
        Tref = 298[K]
    mat6: Common "Air"
      def "Basic"
        relpermeability = 1
        relpermittivity = 1
        dynamicviscosity = eta(T[1/K])[Pa*s]
        ratioofspecificheat = 1.4
        electricconductivity = 0[S/m]
        heatcapacity = Cp(T[1/K])[J/(kg*K)]
        density = rho(pA[1/Pa],T[1/K])[kg/m^3]
        thermalconductivity = k(T[1/K])[W/(m*K)]
        soundspeed = cs(T[1/K])[m/s]
        eta: Piecewise | arg = T; extrap = constant; pieces = {200.0, 1600.0, -8.38278E-7+8.35717342E-8*T^1-7.69429583E-11*T^2+4.6437266E-14*T^3-1.06585607E-17*T^4}
        Cp: Piecewise | arg = T; extrap = constant; pieces = {200.0, 1600.0, 1047.63657-0.372589265*T^1+9.45304214E-4*T^2-6.02409443E-7*T^3+1.2858961E-10*T^4}
        rho: Analytic | expr = pA*0.02897/8.314/T; args = {pA, T}; dermethod = manual; argders = {{pA, d(pA*0.02897/8.314/T,pA)}, {T, d(pA*0.02897/8.314/T,T)}}
        k: Piecewise | arg = T; extrap = constant; pieces = {200.0, 1600.0, -0.00227583562+1.15480022E-4*T^1-7.90252856E-8*T^2+4.11702505E-11*T^3-7.43864331E-15*T^4}
        cs: Analytic | expr = sqrt(1.4*287*T); args = T; dermethod = manual; argders = {T, d(sqrt(1.4*287*T),T)}
      RefractiveIndex
        n = 1
        ki = 0

Physics
  mf: InductionCurrents "Magnetic Fields" on all domains
    dependent variable A = {Ar, Aphi, Az}
    al1: AmperesLaw "Ampère's Law 1" (default)
    axi1: AxialSymmetry (default)
    mi1: MagneticInsulation (default)
    init1: init "Initial Values 1" (default)
    mtcd1: MultiTurnCoilDomain "Multi-Turn Coil 1" on domains 5
      CoilExcitation = Voltage
      N = EM.N
      sigmaCoil = EM.sigma
      AreaFrom = Diameter
      coilWindDiameter = EM.dw
      ICoil = current(t)
      VCoil = voltage(t)

Mesh
  mesh1 "Mesh 1"
    size: MeshSizeDefault | hauto = 3
    ftri1: FreeTri "Free Triangular 1" on domains 5
      size1: Size on domains 5 | hauto = 1
    ftri2: FreeTri "Free Triangular 2" on domains 3
      size1: Size on domains 3 | hauto = 1
    ftri3: FreeTri "Free Triangular 3" on remaining entities

Studies
  std2 "Study 1"
    matsw: MaterialSweep | pname = matsw.comp1.sw1; plistarr = range(1,1,6); pcase = all
    time: Transient "Time Dependent" | tlist = range(0,(t_end-0)/499,t_end)

Solver configurations
  sol1 "Solution 1" (study std2)
    v1: Variables "Dependent Variables 1"
    t1: Time "Time-Dependent Solver 1" | tlist = range(0,(t_end-0)/499,t_end); maxstepbdf = t_end / 500
      dDef: Direct
      fc1: FullyCoupled | linsolver = dDef
  sol2 "Parametric Solutions 1" (study std2)

Datasets
  dset1: Solution | solution = sol1
  dset2: Solution | solution = sol2

Exports
  data7: Data "B_Ti"
    data = dset2
    expr = {t, mf.Br, mf.Bz}
    descr = {Time, "Magnetic flux density, r component", "Magnetic flux density, z component"}
    filename = FEA_data/B_Ti.csv
    location = grid
    gridx2 = Sensor.r
    gridy2 = Sensor.z
  data2: Data "B_Zn"
    data = dset2
    expr = {t, mf.Br, mf.Bz}
    descr = {Time, "Magnetic flux density, r component", "Magnetic flux density, z component"}
    filename = FEA_data/B_Zn.csv
    location = grid
    gridx2 = Sensor.r
    gridy2 = Sensor.z
  data3: Data "B_Mo"
    data = dset2
    expr = {t, mf.Br, mf.Bz}
    descr = {Time, "Magnetic flux density, r component", "Magnetic flux density, z component"}
    filename = FEA_data/B_Mo.csv
    location = grid
    gridx2 = Sensor.r
    gridy2 = Sensor.z
  data4: Data "B_Al"
    data = dset2
    expr = {t, mf.Br, mf.Bz}
    descr = {Time, "Magnetic flux density, r component", "Magnetic flux density, z component"}
    filename = FEA_data/B_Al.csv
    location = grid
    gridx2 = Sensor.r
    gridy2 = Sensor.z
  data5: Data "B_Cu"
    data = dset2
    expr = {t, mf.Br, mf.Bz}
    descr = {Time, "Magnetic flux density, r component", "Magnetic flux density, z component"}
    filename = FEA_data/B_Cu.csv
    location = grid
    gridx2 = Sensor.r
    gridy2 = Sensor.z
  data6: Data "B_E"
    data = dset2
    expr = {t, mf.Br, mf.Bz}
    descr = {Time, "Magnetic flux density, r component", "Magnetic flux density, z component"}
    filename = FEA_data/B_E.csv
    location = grid
    gridx2 = Sensor.r
    gridy2 = Sensor.z