// COMSOL Multiphysics 6.0.0.318 model "FEA_voltage_excitation.mph"
// Outline of the model tree

Parameters
  EM.ai = 3.75[mm]  // inner radius
  EM.ao = 6.00[mm]  // outer radius
  EM.l = 4.00[mm]  // length
  EM.z = 5.00[mm]  // z of center
  EM.dw = 0.35[mm]  // wire diameter
  EM.sigma = 6e7[S/m]  // wire conductivity
  EM.N = 60  // number of turns
  EM.voltage = 1[V]  // voltage
  EM.pw = 3e-3[s]  // voltage pulse width
  t_end = 6e-3[s]  // compute time end
  Disk.r = 30[mm]  // radius of disk
  Disk.h = 6[mm]  // height of disk
  Sensor.z = 2.5[mm]  // sensor z coordinates
  Sensor.r = 0[mm]  // sensor r coordinates lower
  bl = 100[mm]  // boundary length

Functions
  rect1: Rectangle | lower = 0; upper = EM.pw
  an1: Analytic | funcname = voltage; expr = EM.voltage * rect1(t); args = t; fununit = V; argunit = s

Coordinate systems
  ie1: InfiniteElement "Infinite Element Domain 1" on domains 1, 4, 6-8 | ScalingType = Cylindrical

Geometry
  geom1 "Geometry 1" (2D axisymmetric, length unit m)
    r1: Rectangle "Electromagnet" | pos = {EM.ai, EM.z - EM.l/2}; size = {EM.ao - EM.ai, EM.l}
    r2: Rectangle "Disk" | pos = {0, -Disk.h}; size = {Disk.r, Disk.h}
    r3: Rectangle "Compute region"
      pos = {0, -bl/2}
      layername = Layer 1
      layer = 10[mm]
      layerright = on
      layertop = on
      size = {bl, bl}
    pt1: Point | p = {Sensor.r, Sensor.z}
    fin: Finalize "Form Union"

Materials
  mat1: Common "Air" on all domains
    def "Basic"
      relpermeability = 1
      relpermittivity = 1
      dynamicviscosity = eta(T[1/K])[Pa*s]
      ratioofspecificheat = 1.4
      electricconductivity = 0[S/m]
      heatcapacity = Cp(T[1/K])[J/(kg*K)]
      density = rho(pA[1/Pa],T[1/K])[kg/m^3]
      thermalconductivity = k(T[1/K])[W/(m*K)]
      soundspeed = cs(T[1/K])[m/s]
      eta: Piecewise | arg = T; pieces = {200.0, 1600.0, -8.38278E-7+8.35717342E-8*T^1-7.69429583E-11*T^2+4.6437266E-14*T^3-1.06585607E-17*T^4}
      Cp: Piecewise | arg = T; pieces = {200.0, 1600.0, 1047.63657-0.372589265*T^1+9.45304214E-4*T^2-6.02409443E-7*T^3+1.2858961E-10*T^4}
      rho: Analytic | expr = pA*0.02897/8.314/T; args = {pA, T}; dermethod = manual; argders = {{pA, d(pA*0.02897/8.314/T,pA)}, {T, d(pA*0.02897/8.314/T,T)}}
      k: Piecewise | arg = T; pieces = {200.0, 1600.0, -0.00227583562+1.15480022E-4*T^1-7.90252856E-8*T^2+4.11702505E-11*T^3-7.43864331E-15*T^4}
      cs: Analytic | expr = sqrt(1.4*287*T); args = T; dermethod = manual; argders = {T, d(sqrt(1.4*287*T),T)}
    RefractiveIndex
      n = 1
      ki = 0
  sw1: Switch on domains 3
    mat1: Common "Titanium"
      def "Basic"
        relpermeability = 1
        electricconductivity = 0.238e7[S/m]
        thermalexpansioncoefficient = 7.06e-6[1/K]
        heatcapacity = 710[J/(kg*K)]
        relpermittivity = 1
        density = 4940[kg/m^3]
        thermalconductivity = 7.5[W/(m*K)]
      Enu "Young's modulus and Poisson's ratio"
        youngsmodulus = 105e9[Pa]
        poissonsratio = 0.33
    mat2: Common "Zinc"
      def "Basic"
        thermalexpansioncoefficient = 4.5e-6[1/K]
        density = 17800[kg/m^3]
        heatcapacity = 132[J/(kg*K)]
        thermalconductivity = 175[W/(m*K)]
        electricconductivity = 1.69e7
        relpermittivity = 1
        relpermeability = 1
      Enu "Young's modulus and Poisson's ratio"
        youngsmodulus = 3.6e11[Pa]
        poissonsratio = 0.27
      Murnaghan
        l = -4.7e11[Pa]
        m = -7.9e11[Pa]
        n = -1.1e12[Pa]
      Lame "Lamé parameters"
        lambLame = 1.6e11[Pa]
        muLame = 1.4e11[Pa]
    mat3: Common "Molybdenum"
      def "Basic"
        thermalexpansioncoefficient = 4.8e-6[1/K]
        density = 10200[kg/m^3]
        heatcapacity = 250[J/(kg*K)]
        thermalconductivity = 138[W/(m*K)]
        electricconductivity = 1.91e7
        relpermittivity = 1
        relpermeability = 1
      Enu "Young's modulus and Poisson's ratio"
        youngsmodulus = 3.12e11[Pa]
        poissonsratio = 0.30
      Murnaghan
        l = -3.0e11[Pa]
        m = -8.5e11[Pa]
        n = -9.1e11[Pa]
      Lame "Lamé parameters"
        lambLame = 1.8e11[Pa]
        muLame = 1.2e11[Pa]
    mat4: Common "Aluminum"
      def "Basic"
        relpermeability = 1
        heatcapacity = 900[J/(kg*K)]
        thermalconductivity = 238[W/(m*K)]
        electricconductivity = 3.57e7[S/m]
        relpermittivity = 1
        thermalexpansioncoefficient = 23e-6[1/K]
        density = 2700[kg/m^3]
      Enu "Young's modulus and Poisson's ratio"
        youngsmodulus = 70e9[Pa]
        poissonsratio = 0.33
      Murnaghan
        l = -2.5e11[Pa]
        m = -3.3e11[Pa]
        n = -3.5e11[Pa]
      Lame "Lamé parameters"
        lambLame = 5.1e10[Pa]
        muLame = 2.6e10[Pa]
    mat5: Common "Copper"
      def "Basic"
        relpermeability = 1
        electricconductivity = 5.96e7[S/m]
        thermalexpansioncoefficient = 17e-6[1/K]
        heatcapacity = 385[J/(kg*K)]
        relpermittivity = 1
        density = 8700[kg/m^3]
        thermalconductivity = 400[W/(m*K)]
      Enu "Young's modulus and Poisson's ratio"
        youngsmodulus = 110e9[Pa]
        poissonsratio = 0.35
      linzRes "Linearized resistivity"
        rho0 = 1.72e-8[ohm*m]
        alpha = 0.0039[1/K]
        Tref = 298[K]
    mat6: Common "Air"
      def "Basic"
        thermalexpansioncoefficient = alpha_p(pA,T)
        molarmass = 0.02897[kg/mol]
        bulkviscosity = muB(T)
        relpermeability = 1
        relpermittivity = 1
        dynamicviscosity = eta(T)
        ratioofspecificheat = 1.4
        electricconductivity = 0[S/m]
        heatcapacity = Cp(T)
        density = rho(pA,T)
        thermalconductivity = k(T)
        soundspeed = cs(T)
        eta: Piecewise | arg = T; pieces = {200.0, 1600.0, -8.38278E-7+8.35717342E-8*T^1-7.69429583E-11*T^2+4.6437266E-14*T^3-1.06585607E-17*T^4}; argunit = K; fununit = Pa*s
        Cp: Piecewise | arg = T; pieces = {200.0, 1600.0, 1047.63657-0.372589265*T^1+9.45304214E-4*T^2-6.02409443E-7*T^3+1.2858961E-10*T^4}; argunit = K; fununit = J/(kg*K)
        rho: Analytic | expr = pA*0.02897/R_const[K*mol/J]/T; args = {pA, T}; fununit = kg/m^3; argunit = {Pa, K}
        k: Piecewise | arg = T; pieces = {200.0, 1600.0, -0.00227583562+1.15480022E-4*T^1-7.90252856E-8*T^2+4.11702505E-11*T^3-7.43864331E-15*T^4}; argunit = K; fununit = W/(m*K)
        cs: Analytic | expr = sqrt(1.4*R_const[K*mol/J]/0.02897*T); args = T; fununit = m/s; argunit = K
        an1: Analytic | funcname = alpha_p; expr = -1/rho(pA,T)*d(rho(pA,T),T); args = {pA, T}; fununit = 1/K; argunit = {Pa, K}
        an2: Analytic "Analytic 2a" | funcname = muB; expr = 0.6*eta(T); args = T; fununit = Pa*s; argunit = K
      RefractiveIndex
        n = 1
        ki = 0
      NonlinearModel
        BA = (def.gamma+1)/2
      idealGas
        Rs = R_const/Mn
        heatcapacity = Cp(T)
        ratioofspecificheat = 1.4
        molarmass = 0.02897
        Cp: Piecewise | arg = T; pieces = {200.0, 1600.0, 1047.63657-0.372589265*T^1+9.45304214E-4*T^2-6.02409443E-7*T^3+1.2858961E-10*T^4}; argunit = K; fununit = J/(kg*K)

Physics
  mf: InductionCurrents "Magnetic Fields" on all domains
    dependent variable A = {Ar, Aphi, Az}
    al1: AmperesLaw "Ampère's Law 1" (default)
    axi1: AxialSymmetry (default)
    mi1: MagneticInsulation (default)
    init1: init "Initial Values 1" (default)
    mtcd1: Coil "Multi-Turn Coil 1" on domains 5
      CoilExcitation = Voltage
      N = EM.N
      sigmaCoil = EM.sigma
      AreaFrom = Diameter
      coilWindDiameter = EM.dw
      ICoil = current(t)
      VCoil = voltage(t)

Mesh
  mesh1 "Mesh 1" (physics-controlled)
    size: MeshSizeDefault | hauto = 1

Studies
  std2 "Study 1"
    matsw: MaterialSweep | pname = matsw.comp1.sw1; plistarr = range(1,1,6); pcase = all
    time: Transient "Time Dependent" | tlist = range(0,(t_end-0)/99,t_end)

Solver configurations
  sol1 "Solution 1" (study std2)
    v1: Variables "Dependent Variables 1"
    t1: Time "Time-Dependent Solver 1"
      tlist = range(0,(t_end-0)/99,t_end)
      initialstepbdf = t_end * 1e-4
      maxstepbdf = t_end / 500
      dDef: Direct
      fc1: FullyCoupled | linsolver = dDef
  sol2 "Parametric Solutions 1" (study std2)

Datasets
  dset1: Solution | solution = sol1
  dset2: Solution | solution = sol2

Derived values
  pev1: EvalPoint "Point Evaluation 1" on points 5
    data = dset2
    table = tbl1
    expr = {mf.Bz, mf.ICoil_1}
    descr = {"Magnetic flux density, z component", Coil current}